// COMSOL Multiphysics 5.3.0.316 model "cont_test.mph"
// Outline of the model tree

Parameters
  Te = 5 [eV]  // Electron temp
  Ti = 5 [eV]  // Ion temp
  e = 1.6022e-19 [C]  // Electron charge
  m = 1.67e-27 [kg]  // Ion mass
  cs = sqrt((Te+Ti)/m)  // Sound speed

Variables
  var1 "Variables 1" on all domains
    dvx = d(vx,x)
    vx = cs*x [1/m]

Geometry
  geom1 "Geometry 1" (1D, length unit m)
    i1: Interval | p2 = 2; p = {0, 2}
    fin: Finalize "Form Union"

Physics
  c: CoefficientFormPDE on all domains
    dependent variable u
    Units.DependentVariableQuantity = numberdensity
    Units.SourceTermQuantity = productionrate
    cfeq1: CoefficientFormPDE (default) | c = 0; f = -u*dvx; da = 1; al = 0; be = vx
    zflx1: ZeroFluxBoundary "Zero Flux 1" (default)
    init1: init "Initial Values 1" (default) | n = 1.0e19
    dir1: DirichletBoundary "Dirichlet Boundary Condition 1" on boundaries 1 | r = 1.0e19

Mesh
  mesh1 "Mesh 1"
    size: MeshSizeDefault | table = plasma; hauto = 4
    edg1: Edge on remaining entities

Studies
  std1 "Study 1"
    time: Transient "Time Dependent" | tlist = range(0,0.1,10)

Solver configurations
  sol1 "Solution 1" (study std1)
    v1: Variables "Dependent Variables 1"
    t1: Time "Time-Dependent Solver 1" | tlist = range(0,0.1,10)
      dDef: Direct
      fc1: FullyCoupled | linsolver = dDef

Datasets
  dset1: Solution | solution = sol1

Plots
  pg1: PlotGroup1D "1D Plot Group 1" | data = dset1
    lngr1: LineGraph "density" on domains 1 | data = dset1; expr = u; xdataexpr = x
  pg2: PlotGroup1D "1D Plot Group 2" | data = dset1
    lngr1: LineGraph "velocity" on all domains | data = dset1; expr = vx; descr = Velocity vx; xdataexpr = x; legends = vx
    lngr2: LineGraph "velocity derivative" on all domains
      data = dset1
      expr = dvx
      descr = Velocity derivative dvx/dx
      xdataexpr = x
      legends = dvx
  pg3: PlotGroup1D "1D Plot Group 3" | data = dset1
    lngr2: LineGraph "velocity derivative" on all domains
      data = dset1
      expr = dvx
      descr = Velocity derivative dvx/dx
      xdataexpr = x
      legends = dvx