// COMSOL Multiphysics 5.3.0.316 model "coupled_test.mph"
// Outline of the model tree

Parameters
  m = mp_const
  Te = 5.0 [eV]
  Ti = 10.0 [eV]
  cs = sqrt((Te+Ti)/m)

Functions
  an1: Analytic | expr = cs*(2*x-1)

Variables
  var1 "Variables 1"
    vx_con = 1.0 [m/s]
    Te = 5.0 [eV]
    Ti = 10.0 [eV]
    m = mp_const
    e = e_const
    cs = sqrt((Te+Ti)/m)
    vx_lin = cs*(2*x_norm-1)
    x_norm = x/(1 [m])
    om = 1 [1/s]
    n_con = 1 [1/m^3]
    k = 1 [1/m]
    u2_con = 1 [kg/(m^2*s)]
    s2 = u2_con*(om*sin(x_norm)*cos(om*t) + (u2_con/(n_con*m))*(2*k*cos(x_norm)*sin(x_norm))*(sin(om*t))^2)

Geometry
  geom1 "Geometry 1" (1D, length unit m)
    i1: Interval | p2 = pi; p = {0, pi}
    fin: Finalize "Form Union"

Physics
  g: GeneralFormPDE on all domains
    dependent variable u
    Units.DependentVariableQuantity = numberdensity
    Units.CustomSourceTermUnit = 1.0/(m^3*s)
    gfeq1: GeneralFormPDE (default)
      f = n_con*(om*sin(x_norm)*cos(om*t) + vx_con*cos(x_norm)*sin(om*t)*k)
      Ga = vx_con*u
      da = 1
    zflx1: ZeroFluxBoundary "Zero Flux 1" (default)
    init1: init "Initial Values 1" (default) | u = 0
    flux1: FluxBoundary "Flux/Source 1" on boundaries 2 | g = 0
    cons1: Constraint on no boundaries
    flux2: FluxBoundary "Flux/Source 2" on boundaries 1 | g = 0
  g2: GeneralFormPDE on all domains
    dependent variable u2
    Units.DependentVariableQuantity = massflux
    Units.CustomSourceTermUnit = kg/(m^2*s^2)
    gfeq1: GeneralFormPDE (default) | f = 0; Ga = (u2_con*u2/n_con)/m; da = 1
    zflx1: ZeroFluxBoundary "Zero Flux 1" (default)
    init1: init "Initial Values 1" (default) | u2 = 1; u2t = 0
    flux1: FluxBoundary "Flux/Source 1" on all boundaries

Mesh
  mesh1 "Mesh 1" (physics-controlled)
    size: MeshSizeDefault | hauto = 1

Studies
  std1 "Study 1"
    time: Transient "Time Dependent" | tlist = range(0,0.001,0.01); physselection = g; solve for = {g2}

Solver configurations
  sol1 "Solution 1" (study std1)
    v1: Variables "Dependent Variables 1"
    t1: Time "Time-Dependent Solver 1" | tlist = range(0,0.001,0.01)
      dDef: Direct
      fc1: FullyCoupled | linsolver = dDef

Datasets
  dset1: Solution | solution = sol1

Tables
  tbl1: Table
    // Line Integration 1 (u)
    Time (s) | Dependent variable u (1/m^2) | Dependent variable u (1/m^2)
    0 | 1e+19 | 2.99998
    0.1 | 1e+19 | 1.79998
    0.2 | 1e+19 | 0.599976
    0.3 | 1e+19 | -0.600024
    0.4 | 1e+19 | -1.80002
    0.5 | 1e+19 | -3.00002
    0.6 | 1e+19 | -4.20002
    0.7 | 1e+19 | -5.40002
    0.8 | 1e+19 | -6.60002
    0.9 | 1e+19 | -7.80002
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
Plots
  pg1: PlotGroup1D "1D Plot Group 1" | data = dset1
    lngr1: LineGraph on all domains | expr = u; xdata = expr; xdataexpr = x