// COMSOL Multiphysics 5.3.0.316 model "mom_test.mph"
// Outline of the model tree

Parameters
  m = 1.67e-27 [kg]  // Ion mass
  Te = 5.0 [eV]  // Electron temp
  Ti = 5.0 [eV]  // Ion temp
  cs = sqrt((Te+Ti)/m)
  xmax = -0.1 [m]
  xmin = 0.7 [m]
  nmax = 1.0e19 [1/m^3]
  nmin = 1.0e16 [1/m^3]
  gradient = (nmax-nmin)/(xmax-xmin)
  nu = 0.07
  epsilon = 0.001
  om = 1.0 [1/s]
  u0 = 1.0

Functions
  step1: Step

Variables
  var1 "Variables 1"
    nx = exp(norm_x)
    dnx = d(nx,x)
    norm_x = x/1 [m]
    step = (x>0)
    step2 = step1(norm_x)
    source1 = om*u0*cos(norm_x^2 + om*t)
    source2 = 2*u0*norm_x*cos(norm_x^2 + om*t)
    source3 = 2*u0*(cos(norm_x^2 + om*t) - 2*norm_x^2*sin(norm_x^2 + om*t))
    u_mms = u0*(sin(norm_x^2 + om*t) + epsilon)
    u_init = u0*(sin(norm_x^2) + epsilon)

Geometry
  geom1 "Geometry 1" (1D, length unit m)
    i1: Interval | p1 = xmin; p2 = xmax; p = {xmin, xmax}
    fin: Finalize "Form Union"

Physics
  c: CoefficientFormPDE on all domains
    dependent variable u
    Units.DependentVariableQuantity = velocity
    Units.SourceTermQuantity = acceleration
    cfeq1: CoefficientFormPDE (default) | c = nu; f = source2 + source3; da = 1; be = u
    zflx1: ZeroFluxBoundary "Zero Flux 1" (default)
    init1: init "Initial Values 1" (default) | u = u_init
    dir1: DirichletBoundary "LHS Dirichlet Boundary Condition" on boundaries 1 | r = sin(-0.1^2) + epsilon
    dir2: DirichletBoundary "RHS Dirichlet Boundary Condition" on boundaries 2 | r = sin(0.7^2) + epsilon
  cdeq: ConvectionDiffusionEquation (disabled) on all domains
    dependent variable u2
    Units.DependentVariableQuantity = velocity
    cdeq1: ConvectionDiffusionEquation (default) | be = u2; da = 0
    zflx1: ZeroFluxBoundary "Zero Flux 1" (default)
    init1: init "Initial Values 1" (default)
  g: GeneralFormPDE (disabled) on all domains
    dependent variable u3
    Units.DependentVariableQuantity = velocity
    Units.CustomSourceTermUnit = m/s^2
    gfeq1: GeneralFormPDE (default) | f = 0; Ga = (u3^2)/2; da = 1
    zflx1: ZeroFluxBoundary "Zero Flux 1" (default)
    init1: init "Initial Values 1" (default) | u3 = 10
    dir1: DirichletBoundary "Dirichlet Boundary Condition 1" on boundaries 2 | r = 10
    dir2: DirichletBoundary "Dirichlet Boundary Condition 2" on boundaries 1 | r = 0

Mesh
  mesh1 "Mesh 1" (physics-controlled)

Studies
  std1 "Study 1"
    time: Transient "Time Dependent" | tlist = range(0,5.0e-10,1e-8); physselection = c; solve for = {g}

Solver configurations
  sol1 "Solution 1" (study std1)
    v1: Variables "Dependent Variables 1"
    t1: Time "Time-Dependent Solver 1"
      tlist = range(0,5.0e-10,1e-8)
      timemethod = rk
      tstepsbdf = intermediate
      stabcntrl = on
      tstepsrk34 = manual
      timesteprk34 = 1.0e-10
      dDef: Direct
      fc1: FullyCoupled | linsolver = dDef

Datasets
  dset1: Solution | solution = sol1

Plots
  pg1: PlotGroup1D "1D Plot Group 1" | data = dset1
    lngr1: LineGraph "Velocity" on all domains | data = dset1; expr = u; xdata = expr; xdataexpr = x
  pg2: PlotGroup1D "1D Plot Group 2" | data = dset1
    lngr1: LineGraph "Density" on all domains | data = dset1; expr = nx; xdata = expr; xdataexpr = x; legends = nx
    lngr2: LineGraph "Density derivative" on all domains
      data = dset1
      expr = dnx
      xdata = expr
      xdataexpr = x
      legends = dnx
    lngr3: LineGraph on all domains | expr = nx(x); descr = nx; xdataexpr = x; legends = nx (function)